// SBML level 2 version 1

function Mass_Action_0(k1)
  k1;
end

function Mass_Action_2(k1, S1, S2)
  k1*S1*S2;
end

function Mass_Action_1(k1, S1)
  k1*S1;
end

model Srividhya2006_CellCycle()
  // In this model the values of "free CDK" (Id: x2), "cdc25_P" (x4) "Wee1_P" (Id: y5) and "APC" (Id: y6) are assigned using the parameters describing the total concentrations totcdk (Id: c)), totcdc5, totwee1 and totAPC. So if you want to change the levels of these proteins, you need to change the values ofthese parameters.
  // This model originates from BioModels Database: A Database of Annotated Published Models. It is copyright (c) 2005-2010 The BioModels Team.
  // For more information see the terms of use.
  // To cite BioModels Database, please use Le Novère N., Bornstein B., Broicher A., Courtot M., Donizelli M., Dharuri H., Li L., Sauro H., Schilstra M., Shapiro B., Snoep J.L., Hucka M. (2006) BioModels Database: A Free, Centralized Database of Curated, Published, Quantitative Kinetic Models of Biochemical and Cellular Systems Nucleic Acids Res., 34: D689-D691.
  // biomodels.db:MODEL1502077979
  // biomodels.db:BIOMD0000000196
  // isDescribedBy pubmed:16473373
  // isDerivedFrom pubmed:11371173
  // hasTaxon taxonomy:2759
  // isVersionOf reactome:REACT_152 GO:0007049

  // Compartments:
  compartment cell = 1;  // GO:0005623

  // Species:
  species cyclin in cell = 0.01/cell;  // isHomologTo uniprot:P14635; isVersionOf GO:0016538
  species $free_CDK in cell;  // isHomologTo uniprot:P06493; isVersionOf GO:0004672
  species MPF in cell = 0.1/cell;  // hasVersion uniprot:P06493 uniprot:P14635; isVersionOf GO:0031387
  species $cdc25_P in cell;  // isHomologTo uniprot:P04821 uniprot:P30304; isVersionOf kegg.compound:C00562
  species Wee1 in cell = 0.1/cell;  // isHomologTo uniprot:P30291
  species APC_P in cell = 0.1/cell;  // hasVersion kegg.compound:C00562; isVersionOf GO:0005680
  species m in cell = 0.473/cell; m is "cell_mass";  // isVersionOf GO:0005623
  species y4 in cell = 0.9/cell; y4 is "cdc25";  // isHomologTo uniprot:P04821 uniprot:P30304
  species $y5 in cell; y5 is "Wee1_P";  // isHomologTo uniprot:P30291; isVersionOf kegg.compound:C00562
  species $y6 in cell; y6 is "APC";  // isVersionOf GO:0005680
  species Pre_MPF in cell = 0.2/cell;  // hasVersion uniprot:P06493 interpro:IPR015454; isVersionOf GO:0031387 GO:0000307

  // Parameters:
  vf = 0.215;
  kf = 1;
  kc = 0.05;
  Bc = 3.5;
  kd = 0.2;
  B2 = 3.3;
  vM1 = 0.7;
  a1 = 1.2;
  Ka = 0.5;
  j1 = 0.01;
  B1 = 5;
  vM1_2 = 0.55; vM1_2 is "v'M1";
  j1_2 = 0.01; j1_2 is "j'1";
  vM2 = 0.41;
  a2 = 1;
  j2 = 0.01;
  vM2_2 = 1; vM2_2 is "v'M2";
  j3 = 0.01; j3 is "j'3";
  j2_2 = 0.01; j2_2 is "j'2";
  vM3 = 1;
  j3_2 = 0.01;
  vM3_2 = 1; vM3_2 is "v'M3";
  B3 = 1;
  vM4 = 0.7;
  a4 = 2;
  tau = 5;
  j4 = 0.01;
  vM4_2 = 1; vM4_2 is "v'M4";
  j4_2 = 0.01; j4_2 is "j'4";
  mu = 0.01;
  a = 10;
  totcdc25 = 1;
  totwee1 = 1;
  totAPC = 1;
  c = 1.1; c is "totcdk";

  // Assignment rules:
  cdc25_P := totcdc25 - y4;
  y5 := totwee1 - Wee1;
  y6 := totAPC - APC_P;
  free_CDK := c - Pre_MPF - MPF;

  // Reactions:
  cyclinsythesis: => cyclin; Mass_Action_0(vf); cyclinsythesis is "cyclin synthesis";  // isVersionOf GO:0010467
  cyclincdkcomplexformation: cyclin + $free_CDK => Pre_MPF; Mass_Action_2(kf, cyclin, free_CDK); cyclincdkcomplexformation is "cyclin/cdk complex formation";  // isVersionOf reactome:REACT_6216.2
  cyclindegradation: cyclin => ; cyclin*(kc + Bc*APC_P); cyclindegradation is "cyclin degradation";  // modifiers: APC_P; isVersionOf GO:0008054
  MPFdissociation: MPF => $free_CDK; kd*(1 + B2*APC_P)*MPF; MPFdissociation is "MPF cyclin subunit degradation";  // modifiers: APC_P; isVersionOf reactome:REACT_6914.2
  PreMPFMPFtransition: Pre_MPF => MPF; vM1*(1 + a1*cdc25_P/(Ka + cdc25_P))*(Pre_MPF/(j1 + Pre_MPF)); PreMPFMPFtransition is "Pre-MPF -> MPF transition";  // modifiers: cdc25_P; isVersionOf reactome:REACT_6255.1
  MPFPreMPFtransition: MPF => Pre_MPF; vM1_2*(1 + B1*Wee1/(Ka + Wee1))*(MPF/(j1_2 + MPF)); MPFPreMPFtransition is "MPF -> Pre-MPF transition";  // modifiers: Wee1; isVersionOf reactome:REACT_6178.2
  cdc25phosphorylation: y4 => $cdc25_P; vM2*(1 + a2*m*MPF/(Ka + m*MPF))*((1 - cdc25_P)/(j2 + 1 - cdc25_P)); cdc25phosphorylation is "cdc25 phosphorylation";  // modifiers: m, MPF; isVersionOf reactome:REACT_2119.3 GO:0016310
  cdc25dephosphorylation: $cdc25_P => y4; vM2_2*cdc25_P/(j2_2 + cdc25_P); cdc25dephosphorylation is "cdc25 dephosphorylation";  // isVersionOf GO:0016311
  wee1dephosphorylation: $y5 => Wee1; vM3*((1 - Wee1)/(j3_2 + 1 - Wee1)); wee1dephosphorylation is "wee1 dephosphorylation";  // isVersionOf GO:0016311
  wee1phosphorylation: Wee1 => $y5; vM3_2*(1 + B3*m*MPF/(Ka + m*MPF))*(Wee1/(j3 + Wee1)); wee1phosphorylation is "wee1 phosphorylation";  // modifiers: MPF, m; isVersionOf reactome:REACT_1944.2 GO:0016310
  _2: $y6 => APC_P; vM4*((1 + a4*m*delay(MPF, tau)/(Ka + m*delay(MPF, tau)))*(1 - APC_P)/(j4 + (1 - APC_P))); _2 is "APC phosphorylation";  // modifiers: m, MPF; isVersionOf GO:0016310
  APCdephosphorylation: APC_P => $y6; vM4_2*APC_P/(j4_2 + APC_P); APCdephosphorylation is "APC dephosphorylation";  // isVersionOf GO:0016311
  cellmass: => m; mu*m*(1 - m/a); cellmass is "cell growth";  // isVersionOf GO:0016049

  // Events:
  at (MPF < 0.2): m = m/2;  // cell_division; isVersionOf GO:0051301
end
